<?xml version="1.0"?>
<?xml-stylesheet type="text/xsl" href="http://jsbsim.sourceforge.net/JSBSim.xsl"?>
<fdm_config name="c170b" version="2.0" release="ALPHA"
   xmlns:xsi="http://www.w3.org/2001/XMLSchema-instance"
   xsi:noNamespaceSchemaLocation="http://jsbsim.sourceforge.net/JSBSim.xsd">

 <fileheader>
  <author> Aeromatic v 0.96 </author>
  <filecreationdate>2022-10-21</filecreationdate>
  <version>$Revision: 1.30 $</version>
  <description> Models a c170b.</description>
 </fileheader>

<!--
  1.33 control surface deflections corrected, pitch down moment
  1.32 CG corrections
  1.31 AeroPR to 25%MAC, CG corrected (reference to be checked), ground effect, custom rudder effectiveness
  1.30 Ysop edit Nov.2024
  - flight dynamics update reference: http://doc.gnu-darwin.org/cessna172/nonlinear.html (+CL changed)
-->

<!-- to do
flaps40beta pitch
fairings drag correction
Iyz
performance check
propeller
...and a few other items
-->


<!--
  File:     c170b.xml
  Inputs:
    name:          c170b
    type:          light single
    max weight:    2200.0 lb
    wing span:     36.0 ft
    length:        25.0 ft
    wing area:     6 sq-ft
    gear type:     taildragger
    castering:
    retractable?:  no
    # engines:     1
    engine type:   piston
    engine layout: forward fuselage
    yaw damper?    no

  Outputs:
    wing loading:  366.67 lb/sq-ft
    payload:       654.4 lbs
    CL-alpha:      5 per radian
    CL-0:          0.25
    CL-max:        1.4
    CD-0:          0.028
    K:             0.04

-->

 <metrics>
   <wingarea  unit="FT2">  174.00 </wingarea>
   <wingspan  unit="FT" >   36.00 </wingspan>
   <wing_incidence>          2.00 </wing_incidence>
   <chord     unit="FT" >    5.33 </chord>
   <htailarea unit="FT2">    21.96 </htailarea>
   <htailarm  unit="FT" >   15.50 </htailarm>
   <vtailarea unit="FT2">    16.60 </vtailarea>
   <vtailarm  unit="FT" >   0.50 </vtailarm>
   <location name="AERORP" unit="IN">
     <x> 90.88 </x> <!-- 25% MAC=40.96inch aft POH datum. POH datum 49.92 aft FDM datum -->
     <y>   0.00 </y>
     <z>   0 </z>
   </location>
   <location name="EYEPOINT" unit="IN">
     <x>  96.75 </x>
     <y>   0.00 </y>
     <z>  20 </z>
   </location>
   <location name="VRP" unit="IN">
     <x>-10.52</x>
     <y>0</y>
     <z>0</z>
   </location>
 </metrics>

 <mass_balance>
   <ixx unit="SLUG*FT2">       948 </ixx>
   <iyy unit="SLUG*FT2">       1055 </iyy>
   <izz unit="SLUG*FT2">      1600 </izz>
   <emptywt unit="LBS" >      1308 </emptywt>
   <location name="CG" unit="IN">
     <x> 87.97 </x> <!-- 1308lbs@38.05inch, firewall assumed 49.92inch from datum-->
     <y>   0.00 </y>
     <z>  -9.0 </z>
   </location>

        <pointmass name="Pilot">
            <weight unit="LBS"> 180 </weight>
            <location name="POINTMASS" unit="IN">
                <x> 97.77 </x>
                <y> -10.20 </y>
                <z> -6.30 </z>
            </location>
        </pointmass>

        <pointmass name="Co-Pilot">
            <weight unit="LBS"> 0 </weight>
            <location name="POINTMASS" unit="IN">
                <x> 97.77 </x>
                <y> 10.20 </y>
                <z> -6.30 </z>
            </location>
        </pointmass>

        <pointmass name="Left Passenger">
            <weight unit="LBS"> 0 </weight>
            <location name="POINTMASS" unit="IN">
                <x> 120.3 </x>
                <y> -10.20 </y>
                <z> -9.16 </z>
            </location>
        </pointmass>

        <pointmass name="Right Passenger">
            <weight unit="LBS"> 0 </weight>
            <location name="POINTMASS" unit="IN">
                <x> 120.3 </x>
                <y> 10.20 </y>
                <z> -9.16 </z>
            </location>
        </pointmass>

        <pointmass name="Baggage">
            <weight unit="LBS"> 0 </weight>
            <location name="POINTMASS" unit="IN">
                <x> 144.7 </x>
                <y>  0 </y>
                <z> -14 </z>
            </location>
        </pointmass>
 </mass_balance>

 <ground_reactions>

  <contact type="BOGEY" name="LEFT_MAIN">
   <location unit="IN">
     <x> 69 </x>
     <y> -45.27 </y>
     <z> -62.40 </z>
   </location>
   <static_friction>  0.80 </static_friction>
   <dynamic_friction> 0.50 </dynamic_friction>
   <rolling_friction> 0.02 </rolling_friction>
   <spring_coeff unit="LBS/FT">       2000.00 </spring_coeff>
   <damping_coeff unit="LBS/FT/SEC">  160.00 </damping_coeff>
   <damping_coeff_rebound unit="LBS/FT/SEC">320</damping_coeff_rebound>
   <max_steer unit="DEG">0</max_steer>
   <brake_group>LEFT</brake_group>
   <retractable>0</retractable>
  </contact>

  <contact type="BOGEY" name="RIGHT_MAIN">
   <location unit="IN">
     <x> 69 </x>
     <y>  45.27 </y>
     <z> -62.40 </z>
   </location>
   <static_friction>  0.80 </static_friction>
   <dynamic_friction> 0.50 </dynamic_friction>
   <rolling_friction> 0.02 </rolling_friction>
   <spring_coeff unit="LBS/FT">       2000.00 </spring_coeff>
   <damping_coeff unit="LBS/FT/SEC">  160.00 </damping_coeff>
   <damping_coeff_rebound unit="LBS/FT/SEC">320</damping_coeff_rebound>
   <max_steer unit="DEG">0</max_steer>
   <brake_group>RIGHT</brake_group>
   <retractable>0</retractable>
  </contact>

  <contact type="BOGEY" name="TAIL">
   <location unit="IN">
     <x> 317.54 </x>
     <y>   0.00 </y>
     <z> -24.86 </z>
   </location>
   <static_friction>  0.52 </static_friction>
   <dynamic_friction> 0.40 </dynamic_friction>
   <rolling_friction> 0.02 </rolling_friction>
   <spring_coeff unit="LBS/FT">       800.00 </spring_coeff>
   <damping_coeff unit="LBS/FT/SEC">  90.00 </damping_coeff>
   <damping_coeff_rebound unit="LBS/FT/SEC">180</damping_coeff_rebound>
   <max_steer unit="DEG"> 65.00 </max_steer>
   <brake_group>NONE</brake_group>
   <retractable>0</retractable>
  </contact>

  <contact type="STRUCTURE" name="LEFT_WING">
    <location unit="IN">
     <x> 134.00 </x>
     <y> -18.00 </y>
     <z>  -7.50 </z>
    </location>
    <static_friction>  1.00 </static_friction>
    <dynamic_friction> 1.00 </dynamic_friction>
    <spring_coeff unit="LBS/FT">       2200.00 </spring_coeff>
    <damping_coeff unit="LBS/FT/SEC">  2200.00 </damping_coeff>
  </contact>

  <contact type="STRUCTURE" name="RIGHT_WING">
    <location unit="IN">
     <x> 134.00 </x>
     <y>  18.00 </y>
     <z>  -7.50 </z>
    </location>
    <static_friction>  1.00 </static_friction>
    <dynamic_friction> 1.00 </dynamic_friction>
    <spring_coeff unit="LBS/FT">       2200.00 </spring_coeff>
    <damping_coeff unit="LBS/FT/SEC">  2200.00 </damping_coeff>
  </contact>

 </ground_reactions>

	<propulsion>

		<engine file="O-300-A">

			<feed>0</feed>

			<thruster file="HZ-C2YR-1BF">
				<sense> 1 </sense>
 				<p_factor> 59 </p_factor>
				<location unit="IN">
					<x>  13.00 </x>
					<y>   0.00 </y>
					<z>   0.00 </z>
				</location>
				<orient unit="DEG">
					<pitch> 0.00 </pitch>
					<roll>  0.00 </roll>
					<yaw>   0.00 </yaw>
				</orient>
			</thruster>
		</engine>

		<tank type="FUEL" number="0">
			<location unit="IN">
				<x>   36.00 </x>
				<y>    0.0 </y>
				<z>    0.0 </z>
			</location>
			<capacity unit="LBS">  0.10 </capacity>
			<contents unit="LBS">  0.00 </contents>
			<type>AVGAS</type>
			<priority>1</priority>
		</tank>

		<tank type="FUEL" number="1">
			<location unit="IN">
				<x> 96.75 </x>
				<y> -39.37 </y>
				<z>  21.50 </z>
			</location>
			<capacity unit="LBS"> 126.50 </capacity>
			<contents unit="LBS">  81.40 </contents>
			<type>AVGAS</type>
		</tank>

		<tank type="FUEL" number="2">
			<location unit="IN">
				<x> 96.75 </x>
				<y>  39.37 </y>
				<z>  21.50 </z>
			</location>
			<capacity unit="LBS"> 126.50 </capacity>
			<contents unit="LBS">  81.40 </contents>
			<type>AVGAS</type>
		</tank>

	</propulsion>

	<system file="c170b-fuel"/>
	<system file="c170b-electrical"/>
	<system file="c170b-stallwarn"/>
	<system file="c170b-engine"/>

	<flight_control name="FCS: c170b">

        <channel name="Mixture">
            <!-- If the engine was primed enough times and throttle
                 is in starter position, then mixture is 1.
				 (Taked from J3Cub logic)
            -->
            <fcs_function name="fcs/mixture-primer-cmd">
                <function>
                    <table>
                        <independentVar lookup="row">/controls/engines/engine/primer</independentVar>
                        <independentVar lookup="column">/controls/engines/engine/throttle</independentVar>
                        <tableData>
                                 0.09    0.1    0.5    0.51
                            2    0       0      0      0
                            3    0       1      1      0
                            4    0       1      1      0
                            5    0       1      1      0
                            6    0       1      1      0
                            7    0       0      0      0
                        </tableData>
                    </table>
                </function>
            </fcs_function>

            <pure_gain name="fcs/mixture-primer">
                <input>fcs/mixture-cmd-norm</input>
                <gain>fcs/mixture-primer-cmd</gain>
            </pure_gain>

            <!-- Primer logic -->
            <switch name="Mixture Position">
                <default value="fcs/mixture-cmd-norm"/>
                <output>fcs/mixture-pos-norm</output>
                <!-- Use primer if used and engine is cold. If engine
                     is warm, then the mixture lever is used.
                -->
                <test logic="AND" value="fcs/mixture-primer">
                    /controls/engines/engine/use-primer eq 1
                    /engines/engine/oil-temperature-degf le 75
                </test>
            </switch>

        </channel>

	<channel name="Pitch">

            <kinematic name="fcs/elevator-cmd-norm-filtered">
                <input>fcs/elevator-cmd-norm</input>
                <traverse>
                    <setting>
                        <position>-1</position>
                        <time>0</time>
                    </setting>
                    <setting>
                        <position>1</position>
                        <time>0.30</time>
                    </setting>
                </traverse>
                <output>/fcs/elevator-cmd-norm-filtered</output> <!--/sim/model/c172p/cockpit/yoke-elevator -->
            </kinematic>

   <summer name="Pitch Trim Sum">
      <input>fcs/elevator-cmd-norm-filtered</input>
      <input>fcs/pitch-trim-cmd-norm</input>
      <clipto>
        <min> -1 </min>
        <max>  1 </max>
      </clipto>
   </summer>

   <aerosurface_scale name="Elevator Control">
      <input>fcs/pitch-trim-sum</input>
      <range>
        <min> -0.45 </min>
        <max>  0.45 </max>
      </range>
      <output>fcs/elevator-pos-rad</output>
   </aerosurface_scale>

   <aerosurface_scale name="elevator normalization">
      <input>fcs/elevator-pos-rad</input>
      <domain>
        <min> -0.45 </min>
        <max>  0.45 </max>
      </domain>
      <range>
        <min> -1 </min>
        <max>  1 </max>
      </range>
      <output>fcs/elevator-pos-norm</output>
   </aerosurface_scale>

  </channel>

  <channel name="Roll">
<!-- -->
            <kinematic name="fcs/aileron-cmd-norm-filtered">
                <input>fcs/aileron-cmd-norm</input>
                <traverse>
                    <setting>
                        <position>-1</position>
                        <time>0</time>
                    </setting>
                    <setting>
                        <position>1</position>
                        <time>0.15</time>
                    </setting>
                </traverse>
                <output>/fcs/aileron-cmd-norm-filtered</output> <!--/sim/model/c172p/cockpit/yoke-elevator -->
            </kinematic>

   <summer name="Roll Trim Sum">
      <input>fcs/aileron-cmd-norm-filtered</input>
      <input>fcs/roll-trim-cmd-norm</input>
      <clipto>
        <min> -1 </min>
        <max>  1 </max>
      </clipto>
   </summer>

   <aerosurface_scale name="Left Aileron Control">
      <input>fcs/roll-trim-sum</input>
      <range>
        <min> -0.349 </min>
        <max>  0.244 </max>
      </range>
      <output>fcs/left-aileron-pos-rad</output>
   </aerosurface_scale>

   <aerosurface_scale name="left aileron normalization">
      <input>fcs/left-aileron-pos-rad</input>
      <domain>
        <min> -0.349 </min>
        <max>  0.244 </max>
      </domain>
      <range>
        <min> -1 </min>
        <max>  1 </max>
      </range>
      <output>fcs/left-aileron-pos-norm</output>
   </aerosurface_scale>

   <aerosurface_scale name="Right Aileron Control">
      <input>fcs/roll-trim-sum</input>
      <range>
        <min> -0.244 </min>
        <max>  0.349 </max>
      </range>
      <output>fcs/right-aileron-pos-rad</output>
   </aerosurface_scale>

   <aerosurface_scale name="right aileron normalization">
      <input>fcs/right-aileron-pos-rad</input>
      <domain>
        <min> -0.244 </min>
        <max>  0.349 </max>
      </domain>
      <range>
        <min> -1 </min>
        <max> 1 </max>
      </range>
      <output>fcs/right-aileron-pos-norm</output>
   </aerosurface_scale>

  </channel>

	<channel name="Yaw">
            <kinematic name="fcs/rudder-cmd-norm-filtered">
                <input>fcs/rudder-cmd-norm</input>
                <traverse>
                    <setting>
                        <position>-1</position>
                        <time>0</time>
                    </setting>
                    <setting>
                        <position>1</position>
                        <time>0.15</time>
                    </setting>
                </traverse>
                <output>/fcs/rudder-cmd-norm-filtered</output> <!--/sim/model/c172p/cockpit/yoke-elevator -->
            </kinematic>


   <summer name="Rudder Command Sum">
      <input>/fcs/rudder-cmd-norm-filtered</input>
      <input>aero/tune/rudder-tap</input>
      <input>fcs/yaw-trim-cmd-norm</input>
      <clipto>
        <min> -1 </min>
        <max>  1 </max>
      </clipto>
   </summer>

   <aerosurface_scale name="Rudder Control">
      <input>fcs/rudder-command-sum</input>
      <range>
        <min> -0.279 </min>
        <max>  0.279 </max>
      </range>
      <output>fcs/rudder-pos-rad</output>
   </aerosurface_scale>

   <aerosurface_scale name="rudder normalization">
      <input>fcs/rudder-pos-rad</input>
      <domain>
        <min> -0.279 </min>
        <max>  0.279 </max>
      </domain>
      <range>
        <min> -1 </min>
        <max>  1 </max>
      </range>
      <output>fcs/rudder-pos-norm</output>
   </aerosurface_scale>

		<!--	Implement spring simulation based on https://forum.flightgear.org/viewtopic.php?f=4&t=39615, thanks to OO-ZVY!	-->
		<fcs_function>
			<function>
				<product>
					<property>fcs/rudder-pos-norm</property>
					<table>
						<independentVar lookup="row">/velocities/groundspeed-kt</independentVar>
						<tableData>
							0	1
							5	1
							10	0.3
						</tableData>
					</table>
				</product>
			</function>
			<output>fcs/steer-cmd-norm</output>
		</fcs_function>

	</channel>

  <channel name="Flaps">
   <kinematic name="Flaps Control">
     <input>fcs/flap-cmd-norm</input>
                <traverse>
                    <setting>
                        <position>0</position>
                        <time>0</time>
                    </setting>
                    <setting>
                        <position>10</position>
                        <time>0.5</time>
                    </setting>
                    <setting>
                        <position>20</position>
                        <time>0.5</time>
                    </setting>
                    <setting>
                        <position>30</position>
                        <time>0.5</time>
                    </setting>
                    <setting>
                        <position>40</position>
                        <time>0.5</time>
                    </setting>
                </traverse>
     <output>fcs/flap-pos-deg</output>
   </kinematic>

            <aerosurface_scale name="Flap Position Normalizer">
                <input>fcs/flap-pos-deg</input>
                <domain>
                    <min>0</min> <!-- Flaps actual minimum position -->
                    <max>40</max> <!-- Flaps actual maximum position -->
                </domain>
                <range>
                    <min>0</min> <!-- Flaps normalized minimum position -->
                    <max>1</max> <!-- Flaps normalized maximum position -->
                </range>
                <output>fcs/flap-pos-norm</output>
            </aerosurface_scale>

  </channel>

  <channel name="Landing Gear">
  </channel>

 </flight_control>

 <aerodynamics>
    <function name="aero/force/Drag_total">
       <description>Drag due to Elevator Deflection</description>
	<sum>
           <property>aero/force/Drag_elevator</property>
           <property>aero/force/Drag_basic</property>
           <property>aero/force/Drag_induced</property>
	   <property>aero/force/Drag_flap</property>
	   <property>aero/force/Drag_elevator</property>
	</sum>
    </function>
    <function name="aero/function/aileron-mean">
       <description>represents aileron deflection without differential reduction</description>
	<product>
	<avg>
           <property>fcs/left-aileron-pos-rad</property>
           <property>fcs/right-aileron-pos-rad</property>
	</avg>
	<value>1.176</value> <!-- scale up to 20deg -->
	</product>
    </function>

        <function name="aero/function/pitchdown_flap"> <!-- sideslip with full flaps not allowed due to sudden pitch down moment. Values guesswork -->
            <description>trigger for neg Cmm with full flaps and sideslip</description>
		<product>
	            <table>
	            <independentVar>fcs/flap-pos-deg</independentVar>
	                <tableData>
	                      0.0000    0
	                      35    0
	                      40    1
	                  </tableData>
	            </table>
                    <table>
                        <independentVar lookup="row">aero/beta-deg</independentVar>
                        <independentVar lookup="column">aero/alpha-deg</independentVar>
			<independentVar lookup="table">velocities/u-fps</independentVar>
			<tableData breakPoint="80">
				-24 -16 -12 -11 0 11 12 16 24
				0 0 0 0 0 0 0 0 0 0
				3 0 0 0 0 0 0 0 0 0
				4 0 0 0 0 0 0 0 0 0
				8 0 0 0 0 0 0 0 0 0
                        </tableData>
			<tableData breakPoint="100">
				-24 -16 -12 -11 0 11 12 16 24
				0 0 0 0 0 0 0 0 0 0
				3 1 1 1 0 0 0 1 1 1
				4 1 1 1 0 0 0 1 1 1
				8 0 0 0 0 0 0 0 0 0
			</tableData>
			<tableData breakPoint="120">
				-24 -16 -12 -11 0 11 12 16 24
				0 0 0 0 0 0 0 0 0 0
				3 0 0 0 0 0 0 0 0 0
				4 0 0 0 0 0 0 0 0 0
				8 0 0 0 0 0 0 0 0 0
			</tableData>
                    </table>
		</product>
        </function>

    <function name="aero/function/velocity-induced-fps">
        <description> velocity including the propulsion induced velocity.</description>
        <sum>
            <property>velocities/u-aero-fps</property>
            <property>propulsion/engine/prop-induced-velocity_fps</property>
        </sum>
    </function>

    <function name="aero/function/qbar-induced-psf">
        <description> q bar including the propulsion induced velocity</description>
        <product>
            <property>aero/function/velocity-induced-fps</property>
            <property>aero/function/velocity-induced-fps</property>
            <property>atmosphere/rho-slugs_ft3</property>
            <value>0.5</value>
        </product>
    </function>


        <function name="aero/function/kCDge">
            <description>Change_in_drag_due_to_ground_effect</description>
            <table>
                <independentVar>aero/h_b-mac-ft</independentVar>
                <tableData>
                      0.0000    0.4800
                      0.1000    0.5150
                      0.1500    0.6290
                      0.2000    0.7090
                      0.3000    0.8150
                      0.4000    0.8820
                      0.5000    0.9280
                      0.6000    0.9620
                      0.7000    0.9880
                      0.8000    1.0000
                      0.9000    1.0000
                      1.0000    1.0000
                      1.1000    1.0000
                  </tableData>
            </table>
        </function>

        <function name="aero/function/kCLge">
            <description>Change_in_lift_due_to_ground_effect</description>
            <table>
                <independentVar>aero/h_b-mac-ft</independentVar>
                <tableData>
                      0.0000    1.2030
                      0.1000    1.1270
                      0.1500    1.0900
                      0.2000    1.0730
                      0.3000    1.0460
                      0.4000    1.0280
                      0.5000    1.0190
                      0.6000    1.0130
                      0.7000    1.0080
                      0.8000    1.0060
                      0.9000    1.0030
                      1.0000    1.0020
                      1.1000    1.0000
                  </tableData>
            </table>
        </function>

    <function name="aero/tune/wing-rig">
       <description>tuning factor</description>
           <value>0.0016</value>
    </function>

   <function name="aero/tune/rudder-tap">
       <description>fixed trim</description>
           <value>-0.0009</value>
    </function>


  <axis name="LIFT">

    <function name="aero/force/Lift_alpha">
      <description>Lift due to alpha</description>
      <product>
          <property>aero/qbar-psf</property>
          <property>metrics/Sw-sqft</property>
	  <property>aero/function/kCLge</property>
          <table>
            <independentVar lookup="row">aero/alpha-deg</independentVar>
            <tableData>
		-5	-0.285
		0	0.165
		10	1.065
		12	1.131
		13.75	1.36749
		15	1.446
		16	1.485
		17.35	1.46378
		18	1.39212
		19	1.231
		20	0.997
            </tableData>
          </table>
      </product>
    </function>

     <function name="aero/coefficient/CLq">
	<description>Lift_due_to_pitch_rate</description>
	<product>
       		<property>aero/qbar-psf</property>
       		<property>metrics/Sw-sqft</property>
       		<property>velocities/q-aero-rad_sec</property>
       		<property>aero/ci2vel</property>
       		<value>3.9000</value>
        </product>
      </function>

    <function name="aero/force/Lift_flap">
       <description>Delta Lift due to flaps</description>
       <product>
           <property>aero/qbar-psf</property>
           <property>metrics/Sw-sqft</property>
           <property>fcs/flap-pos-deg</property>
           <value> 0.00899 </value>
       </product>
    </function>

    <function name="aero/force/Lift_elevator">
       <description>Lift due to Elevator Deflection</description>
       <product>
           <property>aero/qbar-psf</property>
           <property>metrics/Sw-sqft</property>
           <property>fcs/elevator-pos-rad</property>
           <value>0.43</value>
       </product>
    </function>

  </axis>

  <axis name="DRAG">

    <function name="aero/force/Drag_basic">
       <description>Drag at zero lift</description>
       <product>
          <property>aero/qbar-psf</property>
          <property>metrics/Sw-sqft</property>
          <property>aero/function/kCDge</property>
	  <value>0.029</value>
       </product>
    </function>

    <function name="aero/force/Drag_induced">
       <description>Induced drag</description>
         <product>
           <property>aero/qbar-psf</property>
           <property>metrics/Sw-sqft</property>
           <property>aero/cl-squared</property>
           <property>aero/function/kCDge</property>
           <value>0.054</value>
         </product>
    </function>

    <function name="aero/force/Drag_flap">
       <description>Drag due to flaps</description>
         <product>
           <property>aero/qbar-psf</property>
           <property>metrics/Sw-sqft</property>
           <property>aero/function/kCDge</property>
          <table>
            <independentVar lookup="row">fcs/flap-pos-deg</independentVar>
            <tableData>
		0 0
		10 0.005
		20 0.015
		30 0.035
		40 0.06
            </tableData>
          </table>
         </product>
    </function>

    <function name="aero/force/Drag_beta">
       <description>Drag due to sideslip</description>
       <product>
          <property>aero/qbar-psf</property>
          <property>metrics/Sw-sqft</property>
          <table>
            <independentVar lookup="row">aero/beta-rad</independentVar>
            <tableData>
              -1.57    1.230
              -0.26    0.050
               0.00    0.000
               0.26    0.050
               1.57    1.230
            </tableData>
          </table>
       </product>
    </function>

    <function name="aero/force/Drag_elevator">
       <description>Drag due to Elevator Deflection</description>
       <product>
           <property>aero/qbar-psf</property>
           <property>metrics/Sw-sqft</property>
           <abs><property>fcs/elevator-pos-norm</property></abs>
           <value>0.06</value>
       </product>
    </function>


  </axis>

  <axis name="SIDE">

    <function name="aero/force/Side_beta">
       <description>Side force due to beta</description>
       <product>
           <property>aero/qbar-psf</property>
           <property>metrics/Sw-sqft</property>
           <property>aero/beta-rad</property>
           <value>-0.31</value>
       </product>
    </function>
<!-- cy_p -0,037
Cy_r 0,21
 -->

            <function name="aero/coefficient/CYdr">
                <description>Side_force_due_to_rudder</description>
                <product>
                    <property>aero/qbar-psf</property>
                    <property>metrics/Sw-sqft</property>
                    <property>fcs/rudder-pos-rad</property>
                    <value>0.187</value>
                </product>
            </function>


  </axis>

  <axis name="ROLL">


    <function name="aero/moment/Roll_wing_rig">
       <description>Roll moment due to asymmetric wing rigging</description>
       <product>
           <property>aero/qbar-psf</property>
           <property>metrics/Sw-sqft</property>
           <property>metrics/bw-ft</property>
           <property>aero/tune/wing-rig</property>
       </product>
    </function>


    <function name="aero/moment/Roll_beta">
       <description>Roll moment due to beta</description>
       <product>
           <property>aero/qbar-psf</property>
           <property>metrics/Sw-sqft</property>
           <property>metrics/bw-ft</property>
           <property>aero/beta-rad</property>
           <value>-0.089</value>
       </product>
    </function>

    <function name="aero/moment/Roll_damp">
       <description>Roll moment due to roll rate</description>
       <product>
           <property>aero/qbar-psf</property>
           <property>metrics/Sw-sqft</property>
           <property>metrics/bw-ft</property>
           <property>aero/bi2vel</property>
           <property>velocities/p-aero-rad_sec</property>
           <value>-0.47</value>
       </product>
    </function>

    <function name="aero/moment/Roll_yaw">
       <description>Roll moment due to yaw rate</description>
       <product>
           <property>aero/qbar-psf</property>
           <property>metrics/Sw-sqft</property>
           <property>metrics/bw-ft</property>
           <property>aero/bi2vel</property>
           <property>velocities/r-aero-rad_sec</property>
           <value>0.098</value>
       </product>
    </function>

    <function name="aero/moment/Roll_aileron">
       <description>Roll moment due to aileron</description>
       <product>
          <property>aero/qbar-psf</property>
          <property>metrics/Sw-sqft</property>
          <property>metrics/bw-ft</property>
          <property>aero/function/aileron-mean</property>
          <value>0.178</value>
       </product>
    </function>

    <function name="aero/moment/Roll_rudder">
       <description>Roll moment due to rudder</description>
       <product>
           <property>aero/qbar-psf</property>
           <property>metrics/Sw-sqft</property>
           <property>metrics/bw-ft</property>
           <property>fcs/rudder-pos-rad</property>
           <value>0.0147</value>
       </product>
    </function>

  </axis>

  <axis name="PITCH">

    <function name="aero/moment/Pitch_alpha0">
       <description>Pitch moment at zero alpha</description>
       <product>
           <property>aero/qbar-psf</property>
           <property>metrics/Sw-sqft</property>
           <property>metrics/cbarw-ft</property>
           <value>0.035</value>
<!--           <value>-0.015</value> -->
       </product>
    </function>


    <function name="aero/moment/Pitch_alpha">
       <description>Pitch moment due to alpha</description>
       <product>
           <property>aero/qbar-psf</property>
           <property>metrics/Sw-sqft</property>
           <property>metrics/cbarw-ft</property>
           <property>aero/alpha-rad</property>
           <value>-1.52</value> <!-- existing 0.89 -->
       </product>
    </function>

    <function name="aero/moment/Pitch_elevator">
       <description>Pitch moment due to elevator</description>
       <product>
          <property>aero/qbar-psf</property>
          <property>metrics/Sw-sqft</property>
          <property>metrics/cbarw-ft</property>
          <property>fcs/elevator-pos-rad</property>
          <value>-1.28</value>
       </product>
    </function>

    <function name="aero/moment/Pitch_damp">
       <description>Pitch moment due to pitch rate</description>
       <product>
           <property>aero/qbar-psf</property>
           <property>metrics/Sw-sqft</property>
           <property>metrics/cbarw-ft</property>
           <property>aero/ci2vel</property>
           <property>velocities/q-aero-rad_sec</property>
           <value>-12.4</value>
       </product>
    </function>

    <function name="aero/moment/Pitch_alphadot">
       <description>Pitch moment due to alpha rate</description>
       <product>
           <property>aero/qbar-psf</property>
           <property>metrics/Sw-sqft</property>
           <property>metrics/cbarw-ft</property>
           <property>aero/ci2vel</property>
           <property>aero/alphadot-rad_sec</property>
           <value>-5.2</value>
       </product>
    </function>


    <function name="aero/moment/pitchdown_flap40sideslip">
       <description>Pitch moment due to elevator</description>
       <product>
          <property>aero/qbar-psf</property>
          <property>metrics/Sw-sqft</property>
          <property>metrics/cbarw-ft</property>
          <property>aero/function/pitchdown_flap</property>
          <value>-1</value>
       </product>
    </function>


  </axis>

  <axis name="YAW">

    <function name="aero/moment/Yaw_beta">
       <description>Yaw moment due to beta</description>
       <product>
           <property>aero/qbar-psf</property>
           <property>metrics/Sw-sqft</property>
           <property>metrics/bw-ft</property>
           <property>aero/beta-rad</property>
           <value>0.065</value>
       </product>
    </function>

    <function name="aero/moment/Yaw_damp">
       <description>Yaw moment due to yaw rate</description>
       <product>
           <property>aero/qbar-psf</property>
           <property>metrics/Sw-sqft</property>
           <property>metrics/bw-ft</property>
           <property>aero/bi2vel</property>
           <property>velocities/r-aero-rad_sec</property>
           <value>-0.099</value>
       </product>
    </function>


            <function name="aero/coefficient/Cnp">
                <description>Yaw_moment_due_to_roll-rate</description>
                <product>
                    <property>aero/qbar-psf</property>
                    <property>metrics/Sw-sqft</property>
                    <property>metrics/bw-ft</property>
                    <property>aero/bi2vel</property>
                    <property>velocities/p-aero-rad_sec</property>
           	<value>-0.03</value>
                </product>
            </function>

    <function name="aero/moment/Yaw_rudder">
       <description>Yaw moment due to rudder</description>
       <product>
           <property>aero/qbar-psf</property>
           <property>metrics/Sw-sqft</property>
           <property>metrics/bw-ft</property>
           <property>fcs/rudder-pos-rad</property>
           <value>-0.076</value>
       </product>
    </function>

    <function name="aero/moment/Yaw_aileron">
       <description>Adverse yaw</description>
       <product>
           <property>aero/qbar-psf</property>
           <property>metrics/Sw-sqft</property>
           <property>metrics/bw-ft</property>
           <property>fcs/left-aileron-pos-rad</property>
           <value>-0.016</value>
       </product>
    </function>

  </axis>

 </aerodynamics>

 <external_reactions>
 </external_reactions>


</fdm_config>
